OpenVSP model (file version 4), 10 components.
Geometry view with OpenVSP parameter names; values to 6 digits, angles in degrees, lengths in the model's unit.
Overall bounding box: X_Min=2.6 X_Len=2.44154 Y_Min=-1.3109 Y_Len=2.61594 Z_Min=-1.94656 Z_Len=2.12639

Stack "Case"
  location (X Y Z) 2.6 0 -0.434783, rotation 0 0 0
  bounding box size 1.84061 0.75 1.19045
  cross sections:
    n   XDelta     YDelta  ZDelta     shape
    0   0          0       0          point
    1   0          0       0          circle Circle_Diameter=0.470584
    2   0.0180521  0       0          circle Circle_Diameter=0.469353
    3   0.0180521  0       0          circle Circle_Diameter=0.178059
    4   0.0439464  0       0          as above
    5   0          0       0          circle Circle_Diameter=0.344406
    6   0.157586   0       -0.147968  ellipse Ellipse_Height=0.833827 Ellipse_Width=0.63833
    7   0.261163   0       0.0591871  rounded rectangle RoundRectXSec_Radius=0.15 RoundedRect_Height=0.98431 RoundedRect_Width=0.75
    8   0.941814   0       0          rounded rectangle RoundRectXSec_Radius=0.156221 RoundedRect_Height=0.98431 RoundedRect_Width=0.75
    9   0          0       0          rounded rectangle RoundRectXSec_Radius=0 RoundedRect_Height=1.19045 RoundedRect_Width=0.701081
    10  0.4        0       0          rounded rectangle RoundRectXSec_Radius=0.288506 RoundedRect_Height=1.19045 RoundedRect_Width=0.701081
    11  0          0       0          point

Stack "StackGeom", child of "Case"
  location (X Y Z) 3.54 0 -0.964783, rotation 0 90 0; relative location 0.94 0 -0.53, rotation 0 90 0
  bounding box size 0.605175 0.463147 0.981777
  cross sections:
    n  XDelta    YDelta  ZDelta     shape
    0  0         0       0          rounded rectangle RoundRectXSec_Radius=0.2 RoundedRect_Height=0.42598 RoundedRect_Width=0.42598
    1  0.161266  0       0          as above
    2  0         0       0          circle Circle_Diameter=0.162253
    3  0.111333  0       0          as above
    4  0         -0.04   0.0887705  rounded rectangle RoundRectXSec_Radius=0.137173 RoundedRect_Height=0.445812 RoundedRect_Width=0.420314
    5  0.361     0       0          as above
    6  0         0.04    0.0361     rounded rectangle RoundRectXSec_Radius=0.137173 RoundedRect_Height=0.53463 RoundedRect_Width=0.274346
    7  0.261133  0       0          as above
    8  0         0       0          point

Stack "IntakeFilter", child of "StackGeom"
  location (X Y Z) 3.09 0 -1.72565, rotation 0 -39.7283 0; relative location -0.45 0 -0.76087, rotation 0 -39.7283 0
  bounding box size 0.533912 0.603526 0.464163
  cross sections:
    n  XDelta    YDelta  YRotate  ZDelta     shape
    0  0         0       0        0          rounded rectangle RoundRectXSec_Radius=0 RoundedRect_Height=0.462091 RoundedRect_Width=0.462091
    1  0.264965  0       36       -0.274262  circle Circle_Diameter=0.220382

Stack "OilSump", child of "Case"
  location (X Y Z) 4.1587 -0.55 -1.48478, rotation 0 0 90; relative location 1.5587 -0.55 -1.05, rotation 0 0 90
  bounding box size 0.656557 1.14112 0.611681
  cross sections:
    n  XDelta    YDelta  ZDelta  shape
    0  0         0       0       point
    1  0.52331   0       0       super ellipse Super_Height=0.598191 Super_M=1.4 Super_N=2.70909 Super_Width=0.564539
    2  0.617808  0       0       point

Stack "Starter", child of "Case"
  location (X Y Z) 4.4387 0 0.0152174, rotation 0 0 0; relative location 1.8387 0 0.45, rotation 0 0 0
  bounding box size 0.602847 0.32923 0.32923
  cross sections:
    n  XDelta     YDelta  ZDelta  shape
    0  0          0       0       circle Circle_Diameter=0.318977
    1  0.525902   0       0       circle Circle_Diameter=0.32923
    2  0          0       0       circle Circle_Diameter=0.100115
    3  0.0602596  0       0       as above
    4  0          0       0       point

Stack "Magneto", child of "Starter"
  location (X Y Z) 4.4387 0 -0.493913, rotation 0 0 0; relative location 0 0 -0.50913, rotation 0 0 0
  bounding box size 0.412218 0.325972 0.418659
  cross sections:
    n  XDelta     YDelta  ZDelta     shape
    0  0          0       0          circle Circle_Diameter=0.31582
    1  0.0867828  0       0.0542392  rounded rectangle RoundRectXSec_Radius=0.146379 RoundedRect_Height=0.413019 RoundedRect_Width=0.325972
    2  0.271196   0       0          rounded rectangle RoundRectXSec_Radius=0.0445124 RoundedRect_Height=0.387241 RoundedRect_Width=0.274184
    3  0          0       0.0271196  circle Circle_Diameter=0.216855
    4  0.0542392  0       0          circle Circle_Diameter=0.216713

Stack "Cylinder#1", child of "Case"
  location (X Y Z) 3.18 -0.38 -0.434783, rotation 0 0 -90; relative location 0.58 -0.38 0, rotation 0 0 -90
  bounding box size 0.554554 0.930897 0.631673
  mass: Density=0.391 Shell_Flag=0 Mass_Area=1 Mass_Prior=0
  cross sections:
    n  XDelta    YDelta  YRotate   ZDelta    shape
    0  0         0       0         0         circle Circle_Diameter=0.465387
    1  0.331967  0       0         0         circle Circle_Diameter=0.465386
    2  0         0       0         0.02      super ellipse Super_Height=0.577127 Super_M=2 Super_N=2 Super_Width=0.545518
    3  0.163934  0       0         0         super ellipse Super_Height=0.579482 Super_M=2.42545 Super_N=2.16364 Super_Width=0.554554
    4  0.3       0       0         -0.06085  rounded rectangle RoundRectXSec_Radius=0.17 RoundedRect_Height=0.34 RoundedRect_Width=0.482568
    5  0         0       0         -0.06     rounded rectangle RoundRectXSec_Radius=0.136614 RoundedRect_Height=0.393818 RoundedRect_Width=0.443963
    6  0.119184  0       -4.09091  0         rounded rectangle RoundRectXSec_Radius=0.001 RoundedRect_Height=0.002 RoundedRect_Width=0.002

Stack "Cylinder#3", child of "Cylinder#1"
  location (X Y Z) 3.725 -0.372926 -0.434783, rotation 0 0 -90; relative location 0.545 0.00707403 0, rotation 0 0 -90
  bounding box size 0.554554 0.930897 0.631673
  mass: Density=0.391 Shell_Flag=0 Mass_Area=1 Mass_Prior=0
  cross sections:
    n  XDelta    YDelta  YRotate   ZDelta    shape
    0  0         0       0         0         circle Circle_Diameter=0.465387
    1  0.331967  0       0         0         circle Circle_Diameter=0.465386
    2  0         0       0         0.02      super ellipse Super_Height=0.577127 Super_M=2 Super_N=2 Super_Width=0.545518
    3  0.163934  0       0         0         super ellipse Super_Height=0.579482 Super_M=2.42545 Super_N=2.16364 Super_Width=0.554554
    4  0.3       0       0         -0.06085  rounded rectangle RoundRectXSec_Radius=0.17 RoundedRect_Height=0.34 RoundedRect_Width=0.482568
    5  0         0       0         -0.06     rounded rectangle RoundRectXSec_Radius=0.136614 RoundedRect_Height=0.393818 RoundedRect_Width=0.443963
    6  0.119184  0       -4.09091  0         rounded rectangle RoundRectXSec_Radius=0.001 RoundedRect_Height=0.002 RoundedRect_Width=0.002

Stack "Cylinder#2", child of "Cylinder#3"
  location (X Y Z) 3.225 0.367074 -0.434783, rotation 0 0 90; relative location -0.5 0.74 0, rotation 0 0 90
  bounding box size 0.554554 0.930897 0.631673
  mass: Density=0.391 Shell_Flag=0 Mass_Area=1 Mass_Prior=0
  cross sections:
    n  XDelta    YDelta  YRotate   ZDelta    shape
    0  0         0       0         0         circle Circle_Diameter=0.465387
    1  0.331967  0       0         0         circle Circle_Diameter=0.465386
    2  0         0       0         0.02      super ellipse Super_Height=0.577127 Super_M=2 Super_N=2 Super_Width=0.545518
    3  0.163934  0       0         0         super ellipse Super_Height=0.579482 Super_M=2.42545 Super_N=2.16364 Super_Width=0.554554
    4  0.3       0       0         -0.06085  rounded rectangle RoundRectXSec_Radius=0.17 RoundedRect_Height=0.34 RoundedRect_Width=0.482568
    5  0         0       0         -0.06     rounded rectangle RoundRectXSec_Radius=0.136614 RoundedRect_Height=0.393818 RoundedRect_Width=0.443963
    6  0.119184  0       -4.09091  0         rounded rectangle RoundRectXSec_Radius=0.001 RoundedRect_Height=0.002 RoundedRect_Width=0.002

Stack "Cylinder#3", child of "Cylinder#2"
  location (X Y Z) 3.77 0.374148 -0.434783, rotation 0 0 90; relative location 0.545 0.00707403 0, rotation 0 0 90
  bounding box size 0.554554 0.930897 0.631673
  mass: Density=0.391 Shell_Flag=0 Mass_Area=1 Mass_Prior=0
  cross sections:
    n  XDelta    YDelta  YRotate   ZDelta    shape
    0  0         0       0         0         circle Circle_Diameter=0.465387
    1  0.331967  0       0         0         circle Circle_Diameter=0.465386
    2  0         0       0         0.02      super ellipse Super_Height=0.577127 Super_M=2 Super_N=2 Super_Width=0.545518
    3  0.163934  0       0         0         super ellipse Super_Height=0.579482 Super_M=2.42545 Super_N=2.16364 Super_Width=0.554554
    4  0.3       0       0         -0.06085  rounded rectangle RoundRectXSec_Radius=0.17 RoundedRect_Height=0.34 RoundedRect_Width=0.482568
    5  0         0       0         -0.06     rounded rectangle RoundRectXSec_Radius=0.136614 RoundedRect_Height=0.393818 RoundedRect_Width=0.443963
    6  0.119184  0       -4.09091  0         rounded rectangle RoundRectXSec_Radius=0.001 RoundedRect_Height=0.002 RoundedRect_Width=0.002
