OpenVSP model (file version 5), 7 components.
Geometry view with OpenVSP parameter names; values to 6 digits, angles in degrees, lengths in the model's unit.
Overall bounding box: X_Min=0 X_Len=26.5984 Y_Min=-14.9961 Y_Len=29.9922 Z_Min=-2.41665 Z_Len=8.91665

Fuselage "Pod"
  location (X Y Z) 0 0 0, rotation 0 0 0
  bounding box size 14 5.03254 4.8333
  Design: Length=14
  cross sections:
    n  XLocPercent  YLocPercent  ZLocPercent  shape
    0  0            0            -0.053       point
    1  0.3          0            0            edit curve Width=5 Height=4.8333 AbsoluteFlag=0 SymType=1 cubic Bezier points (X Y): 0.5 0, 0.506507 -0.495205, 0.276142 -0.5, 0 -0.5, -0.276142 -0.5, -0.506507 -0.495205, -0.5 0, -0.501923 0.499315, -0.276142 0.5, 0 0.5, 0.276142 0.5, 0.501923 0.499315, 0.5 0
    2  0.670082     0            0            edit curve Width=4.4 Height=4.8333 AbsoluteFlag=0 SymType=1 cubic Bezier points (X Y): 0.5 0, 0.492756 -0.499315, 0.276142 -0.5, 0 -0.5, -0.276142 -0.5, -0.492756 -0.499315, -0.5 0, -0.501923 0.499315, -0.276142 0.5, 0 0.5, 0.276142 0.5, 0.501923 0.499315, 0.5 0
    3  0.768787     0            0.008        edit curve Width=4.3333 Height=4.5 AbsoluteFlag=0 SymType=1 cubic Bezier points (X Y): 0.5 0, 0.5 -0.276142, 0.276142 -0.5, 0 -0.5, -0.276142 -0.5, -0.5 -0.276142, -0.5 0, -0.492756 0.496572, -0.276142 0.5, 0 0.5, 0.276142 0.5, 0.492756 0.496572, 0.5 0
    4  1            0            0.0917827    edit curve Width=0 Height=0 AbsoluteFlag=0 SymType=1 cubic Bezier points (X Y): 0.5 0, 0.5 -0.276142, 0.276142 -0.5, 0 -0.5, -0.276142 -0.5, -0.5 -0.276142, -0.5 0, -0.5 0.276142, -0.276142 0.5, 0 0.5, 0.276142 0.5, 0.5 0.276142, 0.5 0

Fuselage "Tail_Boom"
  location (X Y Z) 10 0 1.83607, rotation 0 0 0
  bounding box size 15 1 1
  Design: Length=15
  cross sections:
    n  XLocPercent  YLocPercent  ZLocPercent  shape
    0  0            0            0            point
    1  0.08         0            0            ellipse Ellipse_Height=1 Ellipse_Width=1
    2  0.5          0            0            as above
    3  0.92         0            0            as above
    4  1            0            0            point

Wing "Wing"
  location (X Y Z) 6.38484 0 3, rotation 0 0 0
  symmetric about XZ
  bounding box size 5.1 29.9922 0.928792
  totals: TotalSpan=30 TotalProjectedSpan=29.9817 TotalChord=4.05 TotalArea=121.5 TotalAR=7.39839 MAC=4.14074
  root: chord 5.1, twist 0, NACA 4-series Camber=0 CamberLoc=0.2 ThickChord=0.1
  sections:
    n  Span  Root_Chord  Tip_Chord  Area   Sweep  Sweep_Location  Dihedral  Twist  Twist_Location  tip airfoil
    1  15    5.1         3          60.75  2      0               2         0      0.25            as above

Wing "H_Tail"
  location (X Y Z) 23.5 0 2, rotation 0 0 0
  symmetric about XZ
  bounding box size 2.28163 10 0.220128
  totals: TotalSpan=10 TotalProjectedSpan=10 TotalChord=1.8 TotalArea=18 TotalAR=5.55556 MAC=1.82963
  root: chord 2.2, twist 0, NACA 4-series Camber=0 CamberLoc=0.2 ThickChord=0.1
  sections:
    n  Span  Root_Chord  Tip_Chord  Area  Sweep  Sweep_Location  Dihedral  Twist  Twist_Location  tip airfoil
    1  5     2.2         1.4        9     10     0               0         0      0.25            as above

Wing "V_Tail"
  location (X Y Z) 23 0 2, rotation 90 0 0
  bounding box size 3.59838 0.250145 4.5
  totals: TotalSpan=4.5 TotalProjectedSpan=4.5 TotalChord=2 TotalArea=9 TotalAR=2.25 MAC=2.04167
  root: chord 2.5, twist 0, NACA 4-series Camber=0 CamberLoc=0.2 ThickChord=0.1
  sections:
    n  Span  Root_Chord  Tip_Chord  Area  Sweep  Sweep_Location  Dihedral  Twist  Twist_Location  tip airfoil
    1  4.5   2.5         1.5        9     25     0               0         0      0.25            as above

Fuselage "Ice"
  location (X Y Z) 7.54098 0 2.95082, rotation 0 -0.409836 0
  bounding box size 4.01324 2.02294 1.8932
  Design: Length=4
  cross sections:
    n  XLocPercent  YLocPercent  ZLocPercent  shape
    0  0            0            0.1          point
    1  0.357011     0            0            edit curve Width=2 Height=4.8333 AbsoluteFlag=0 SymType=1 cubic Bezier points (X Y): 0.5 0, 0.511469 0.00205479, 0.276142 0.00205479, 0 0.00205479, -0.276142 0.00205479, -0.511469 0.00205479, -0.5 0, -0.481675 0.302055, -0.276142 0.310274, 0 0.310274, 0.276142 0.310274, 0.481675 0.302055, 0.5 0
    2  0.596814     0            0            edit curve Width=2 Height=4.8333 AbsoluteFlag=0 SymType=1 cubic Bezier points (X Y): 0.5 0, 0.491606 0.00205479, 0.276142 0.00205479, 0 0.00205479, -0.276142 0.00205479, -0.491606 0.00205479, -0.5 0, -0.491606 0.302055, -0.276142 0.306164, 0 0.306164, 0.276142 0.306164, 0.491606 0.302055, 0.5 0
    3  1            0            0.0917827    edit curve Width=0 Height=0 AbsoluteFlag=0 SymType=1 cubic Bezier points (X Y): 0.5 0, 0.5 -0.276142, 0.276142 -0.5, 0 -0.5, -0.276142 -0.5, -0.5 -0.276142, -0.5 0, -0.5 0.276142, -0.276142 0.5, 0 0.5, 0.276142 0.5, 0.5 0.276142, 0.5 0

Wing "Pylon"
  location (X Y Z) 6.06557 0 2, rotation 90 0 0
  bounding box size 7.5 0.750435 1
  totals: TotalSpan=1 TotalProjectedSpan=1 TotalChord=6 TotalArea=6 TotalAR=0.166667 MAC=6.125
  root: chord 7.5, twist 0, NACA 4-series Camber=0 CamberLoc=0.2 ThickChord=0.1
  sections:
    n  Span  Root_Chord  Tip_Chord  Area  Sweep  Sweep_Location  Dihedral  Twist  Twist_Location  tip airfoil
    1  1     7.5         4.5        6     25     0               0         0      0.25            as above
