OpenVSP model (file version 5), 7 components.
Geometry view with OpenVSP parameter names; values to 6 digits, angles in degrees, lengths in the model's unit.
Overall bounding box: X_Min=-0.0959758 X_Len=3.28797 Y_Min=-5 Y_Len=10.9448 Z_Min=-0.944751 Z_Len=2.2695

Blank "Wing_Parent"
  location (X Y Z) 0 0 0, rotation 0 0 0

Wing "CleanWing", child of "Wing_Parent"
  location (X Y Z) 0.849 0 0.333, rotation 0 0 0
  symmetric about XZ
  bounding box size 2.34319 10 0.359226
  totals: TotalSpan=10 TotalProjectedSpan=10 TotalChord=2.34304 TotalArea=23.4304 TotalAR=4.26796 RelativeTwistFlag=1
  root: chord 2.34304, twist -0.23512, airfoil file "x57_maxwell_root_foil_nov19_2020"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 BaseThickChord=0.149669 ThickChord=0.149669
  sections:
    n  Span  Root_Chord  Tip_Chord  Area     Sweep  Sweep_Location  Dihedral  Twist  Twist_Location  tip airfoil
    1  5     2.34304     2.34304    11.7152  0      0.7             0         0      0.7             as above

Blank "70percentC", child of "CleanWing"
  location (X Y Z) 2.48967 0 0.352833, rotation 0 0 0; relative location 1.64067 0 0.0198328, rotation 0 0 0

Blank "quarterchord", child of "CleanWing"
  location (X Y Z) 1.43476 0 0.353, rotation 0 0 0; relative location 0.58576 0 0.02, rotation 0 0 0

Blank "origin", child of "CleanWing"
  location (X Y Z) 0.849 0 0.333, rotation 0 0 0; relative location 0 0 0, rotation 0 0 0

Propeller "Midspan-HLP", child of "Wing_Parent"
  location (X Y Z) 0 0 0, rotation 0 0 0
  bounding box size 0.249001 1.88952 1.8895
  Design: Diameter=1.8895 NumBlade=5 Beta34=27.3513 UseBeta34Flag=0 Feather=0 Rotate=0 Precone=0 ReverseFlag=0 FoldAngle=0 PropMode=1 AF=88.7971 CLi=0 Chord=0.159317 Solidity=0.253561 ConstructXoC=0.5 FeatherAxisXoC=0.5 FeatherOffsetXoC=0
  cross sections:
    n  RadiusFrac  shape
    0  0.20284     airfoil file "MH 114  13.02%"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 BaseThickChord=0.130507 Chord=0.122024 ThickChord=0.130507
    1  1           airfoil file "MH 114  13.02%"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 BaseThickChord=0.130507 Chord=0.0190358 ThickChord=0.130507
  Chord along r/R (PCHIP): 0.20284: 0.12916, 0.20465: 0.13131, 0.20822: 0.13623, 0.21345: 0.14326, 0.22023: 0.15233, 0.22841: 0.16305, 0.23782: 0.17499, 0.24832: 0.1877, 0.25976: 0.20081, 0.27201: 0.21418, 0.28494: 0.22729, 0.29844: 0.23902, 0.31243: 0.24829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
  Twist along r/R (PCHIP): 0.20284: 69.752, 0.20465: 69.542, 0.20822: 69.059, 0.21345: 68.367, 0.22023: 67.469, 0.22841: 66.393, 0.23782: 65.167, 0.24832: 63.819, 0.25976: 62.376, 0.27201: 60.854, 0.28494: 59.27, 0.29844: 57.637, 0.31243: 55.956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
  Rake along r/R (PCHIP): 0.20284: -0.0511643, 0.20465: -0.050631, 0.20822: -0.0493685, 0.21345: -0.0476077, 0.22023: -0.0454446, 0.22841: -0.0430556, 0.23782: -0.0406631, 0.24832: -0.0384653, 0.25976: -0.0366926, 0.27201: -0.0354905, 0.28494: -0.0349927, 0.29844: -0.0352985, 0.31243: -0.0364249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
  Skew along r/R (PCHIP): 0.20284: 0.125749, 0.20465: 0.125029, 0.20822: 0.123369, 0.21345: 0.120975, 0.22023: 0.117841, 0.22841: 0.114049, 0.23782: 0.109679, 0.24832: 0.104816, 0.25976: 0.0995464, 0.27201: 0.0939198, 0.28494: 0.0879937, 0.29844: 0.0818139, 0.31243: 0.0753831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
  Thick along r/R (linear): 0.20284: 0.130507, 1: 0.130507

Propeller "Wingtip-HLP", child of "Wing_Parent"
  location (X Y Z) 0 5 0.38, rotation 0 0 0
  bounding box size 0.249001 1.88952 1.8895
  Design: Diameter=1.8895 NumBlade=5 Beta34=27.3513 UseBeta34Flag=0 Feather=0 Rotate=0 Precone=0 ReverseFlag=0 FoldAngle=0 PropMode=1 AF=88.7971 CLi=0 Chord=0.159317 Solidity=0.253561 ConstructXoC=0.5 FeatherAxisXoC=0.5 FeatherOffsetXoC=0
  cross sections:
    n  RadiusFrac  shape
    0  0.20284     airfoil file "MH 114  13.02%"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 BaseThickChord=0.130507 Chord=0.122024 ThickChord=0.130507
    1  1           airfoil file "MH 114  13.02%"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 BaseThickChord=0.130507 Chord=0.0190358 ThickChord=0.130507
  blade curves as in "Midspan-HLP"

VSPAERO settings: Sref=23.4304 bref=10 cref=2.34304 Xcg=1.435 Ycg=0 Zcg=0.353 AlphaStart=0 AlphaEnd=10 AlphaNpts=1 BetaStart=0 BetaEnd=0 BetaNpts=1 MachStart=0.0877 MachEnd=0 MachNpts=1 ReCref=622610 Vinf=97.89 Rho=0.0023769
